<?xml version="1.0" ?>
<fdm_config release="Alpha" version="2.0">
    <flight_control file="FlightControl.xml"/>
    <system file="Effectors.xml"/>

    <mass_balance file="Mass.xml"/>
    <ground_reactions file="Gear.xml"/>
    <propulsion file="Propulsion.xml"/>
    <metrics file="Metrics.xml"/>
    <aerodynamics file="Aero.xml"/>

    <!-- <system file="SensorImu.xml"/>
    <system file="SensorBaro.xml"/>
    <system file="SensorGps.xml"/>
    <system file="SensorPitot.xml"/> -->
    <system file="px4_default_mag_sensor.xml"/>
    <system file="px4_default_baro_sensor.xml"/>
    <system file="px4_default_imu_sensor.xml"/>
    <system file="px4_default_gps_sensor.xml"/>
</fdm_config>
